ADC_ref := 3.3 V
PGA := 16
R_1 := 1500 Ω
R_2 := 22000 Ω
R_3 := 2200 Ω
G := 1/(R_1*(1/R_1 + 1/R_2 + 1/R_3))*PGA = 9.14286
V_offset := ADC_ref/(R_2*(1/R_1 + 1/R_2 + 1/R_3))*PGA = 2.05714 V
R_sense := 0.003 Ω
I := 5 A
V_sense := I*R_sense = 15 mV
V_ADC_range := G*V_sense = 0.137143 V
V_ADC_input_max := V_offset + V_ADC_range = 2.19429 V
ADC_res := 2^12 - 1 = 4095
ADC_meas := V_ADC_range/ADC_ref*ADC_res = 170.182
I_res := ADC_meas/I = 0.0340364 1/mA
I_prADCstep := I/ADC_meas = 29.3803 mA
ADC_mv_to_I_sense := 1/(R_sense*G) = 36.4583 1/Ω
